// SBML level 2 version 1
// Copyright (C) 2010 - 2014 by Pedro Mendes, Virginia Tech Intellectual
// Properties, Inc., University of Heidelberg, and The University
// of Manchester.
// All rights reserved.
// Copyright (C) 2008 - 2009 by Pedro Mendes, Virginia Tech Intellectual
// Properties, Inc., EML Research, gGmbH, University of Heidelberg,
// and The University of Manchester.
// All rights reserved.
// Copyright (C) 2004 - 2007 by Pedro Mendes, Virginia Tech Intellectual
// Properties, Inc. and EML Research, gGmbH.
// All rights reserved.

function Function_for_Reaction2(Y, cell, k1)
  k1*Y/cell;
end

function Function_for_Reaction1(X, cell, k1)
  k1*X/cell;
end

function Function_for_Reaction12(K, PY, alpha, alpha0, alpha1, cell, n)
  (alpha0 + (alpha + PY^n*alpha1)/(K^n + PY^n))/cell;
end

function Function_for_Reaction3(Z, cell, k1)
  k1*Z/cell;
end

function Function_for_Reaction4(X, beta, cell)
  X*beta/cell;
end

function Function_for_Reaction7(PX, beta, cell)
  PX*beta/cell;
end

function Function_for_Reaction9(PZ, beta, cell)
  PZ*beta/cell;
end

function Function_for_Reaction11(K, PX, alpha, alpha0, alpha1, cell, n)
  (alpha0 + (alpha + PX^n*alpha1)/(K^n + PX^n))/cell;
end

function Function_for_Reaction8(PY, beta, cell)
  PY*beta/cell;
end

function Function_for_Reaction5(Y, beta, cell)
  Y*beta/cell;
end

function Function_for_Reaction10(K, PZ, alpha, alpha0, alpha1, cell, n)
  (alpha0 + (alpha + PZ^n*alpha1)/(K^n + PZ^n))/cell;
end

function Function_for_Reaction6(Z, beta, cell)
  Z*beta/cell;
end

model repressilator()
  // NoName
  // Repressilator: A synthetic oscillatory network of transcriptional regulators
  // Citation
  // Elowitz MB, Leibler S (2000) A synthetic oscillatory network of transcriptional regulators.Nature.403 : 335 - 338. http:// www.nature.com/cgi-taf/DynaPage.taf?file=/nature/journal/v403/n6767/full/ 403335a0_fs.html
  // Description
  // This file describes the repressilator system. The authors of this model ( see reference) use three transcriptional repressor systems that are not part of any natural biological clock to build an oscillating network that they called the repressilator. The model system was induced in Escherichia coli.In this system, LacI (variable X is the mRNA, variable PX is the protein) inhibits the tetracycline- resistance transposon tetR (Y, PY describe mRNA and protein) . Protein tetR inhibits the gene Cl from phage Lambda ( Z, PZ: mRNA, protein), and protein Cl inhibits lacI expression. With appropriate parameter values this system oscillates.
  // Rate constant Reaction
  // k1 = 1 X -> EmptySet
  // k1 = 1 Y -> EmptySet
  // k1 = 1 Z -> EmptySet
  // K = 1 (hill khalf) PX |-> Y
  // K = 1 (hill khalf) PY |-> Z
  // K = 1 (hill khalf) PZ |-> X
  // n = 2.1 (hill nhill) PX |-> Y
  // n = 2.1 (hill nhill) PY |-> Z
  // n = 2.1 (hill nhill) PZ |-> X
  // {alpha0, alpha} = {0, 250} (hill basalRate) PX |-> Y
  // {alpha0, alpha} = {0, 250} (hill basalRate) PY |-> Z
  // {alpha0, alpha} = {0, 250} (hill basalRate) PZ |-> X
  // alpha1 = 0 (hill vmax) PX |-> Y
  // alpha1 = 0 (hill vmax) PY |-> Z
  // alpha1 = 0 (hill vmax) PZ |-> X
  // beta = 5 PX -> EmptySet
  // beta = 5 PY -> EmptySet
  // beta = 5 PZ -> EmptySet
  // beta = 5 X + EmptySet -> PX + X
  // beta = 5 Y + EmptySet -> PY + Y
  // beta = 5 Z + EmptySet -> PZ + Z
  // Variable IC ODE
  // PX 5 PX'[t] == -(beta*PX[t]) + beta*X[t]
  // PY 0 PY'[t] == -(beta*PY[t]) + beta*Y[t]
  // PZ 15 PZ'[t] == -(beta*PZ[t]) + beta*Z[t]
  // X 0 X'[t] == alpha0 + (alpha + alpha1*PZ[t]^n)/(K^n + PZ[t]^n) - k1*X[t]
  // Y 0 Y'[t] == alpha0 + (alpha + alpha1*PX[t]^n)/(K^n + PX[t]^n) - k1*Y[t]
  // Z 0 Z'[t] == alpha0 + (alpha + alpha1*PY[t]^n)/(K^n + PY[t]^n) - k1*Z[t]
  // Generated by Cellerator Version 1.0 update 2.1127 using Mathematica 4.2 for Mac OS X (June 4, 2002), November 27, 2002 12:15:32, using (PowerMac,PowerPC, Mac OS X,MacOSX,Darwin)
  // author=B.E.Shapiro

  // Compartments:
  compartment cell = 1;

  // Species:
  species $EmptySet in cell = 0;
  species PX in cell = 5/cell;
  species PY in cell = 0;
  species PZ in cell = 15/cell;
  species X in cell = 0;
  species Y in cell = 0;
  species Z in cell = 0;

  // Reactions:
  Reaction1: X => $EmptySet; cell*Function_for_Reaction1(X, cell, Reaction1_k1);
    Reaction1_k1 = 1;
  Reaction2: Y => $EmptySet; cell*Function_for_Reaction2(Y, cell, Reaction2_k1);
    Reaction2_k1 = 1;
  Reaction3: Z => $EmptySet; cell*Function_for_Reaction3(Z, cell, Reaction3_k1);
    Reaction3_k1 = 1;
  Reaction4: $EmptySet + X => PX + X; cell*Function_for_Reaction4(X, Reaction4_beta, cell);
    Reaction4_beta = 5;
  Reaction5: $EmptySet + Y => PY + Y; cell*Function_for_Reaction5(Y, Reaction5_beta, cell);
    Reaction5_beta = 5;
  Reaction6: $EmptySet + Z => PZ + Z; cell*Function_for_Reaction6(Z, Reaction6_beta, cell);
    Reaction6_beta = 5;
  Reaction7: PX => $EmptySet; cell*Function_for_Reaction7(PX, Reaction7_beta, cell);
    Reaction7_beta = 5;
  Reaction8: PY => $EmptySet; cell*Function_for_Reaction8(PY, Reaction8_beta, cell);
    Reaction8_beta = 5;
  Reaction9: PZ => $EmptySet; cell*Function_for_Reaction9(PZ, Reaction9_beta, cell);
    Reaction9_beta = 5;
  Reaction10: $EmptySet => X; cell*Function_for_Reaction10(Reaction10_K, PZ, Reaction10_alpha, Reaction10_alpha0, Reaction10_alpha1, cell, Reaction10_n);  // modifiers: PZ
    Reaction10_K = 1; Reaction10_alpha = 250; Reaction10_alpha0 = 0; Reaction10_alpha1 = 0; Reaction10_n = 2.1;
  Reaction11: $EmptySet => Y; cell*Function_for_Reaction11(Reaction11_K, PX, Reaction11_alpha, Reaction11_alpha0, Reaction11_alpha1, cell, Reaction11_n);  // modifiers: PX
    Reaction11_K = 1; Reaction11_alpha = 250; Reaction11_alpha0 = 0; Reaction11_alpha1 = 0; Reaction11_n = 2.1;
  Reaction12: $EmptySet => Z; cell*Function_for_Reaction12(Reaction12_K, PY, Reaction12_alpha, Reaction12_alpha0, Reaction12_alpha1, cell, Reaction12_n);  // modifiers: PY
    Reaction12_K = 1; Reaction12_alpha = 250; Reaction12_alpha0 = 0; Reaction12_alpha1 = 0; Reaction12_n = 2.1;
end
