// SBML level 2 version 1
// Copyright (C) 2010 - 2014 by Pedro Mendes, Virginia Tech Intellectual
// Properties, Inc., University of Heidelberg, and The University
// of Manchester.
// All rights reserved.
// Copyright (C) 2008 - 2009 by Pedro Mendes, Virginia Tech Intellectual
// Properties, Inc., EML Research, gGmbH, University of Heidelberg,
// and The University of Manchester.
// All rights reserved.
// Copyright (C) 2004 - 2007 by Pedro Mendes, Virginia Tech Intellectual
// Properties, Inc. and EML Research, gGmbH.
// All rights reserved.

function Function_for_J3_0(E4P_ch, F6P_ch, F_TKL_v, GAP_ch, X5P_ch, compartment, q7)
  F_TKL_v*(F6P_ch*GAP_ch - E4P_ch*X5P_ch/q7)/compartment;
end

function Function_for_J0_0(FBP_ch, Light_on, PGA_ch, Pi_ch, Rbco_KiFBP, Rbco_KiNADPH, Rbco_KiPGA, Rbco_KiPi, Rbco_KiSBP, Rbco_km, Rbco_vm, RuBP_ch, SBP_ch, compartment, x_NADPH_ch)
  Light_on*Rbco_vm*RuBP_ch/(RuBP_ch + Rbco_km*(1 + PGA_ch/Rbco_KiPGA + FBP_ch/Rbco_KiFBP + SBP_ch/Rbco_KiSBP + Pi_ch/Rbco_KiPi + x_NADPH_ch/Rbco_KiNADPH))/compartment;
end

function Function_for_J1_0(DHAP_ch, GAP_ch, TPI_v, compartment, q4)
  TPI_v*(GAP_ch - DHAP_ch/q4)/compartment;
end

function Function_for_J2_0(DHAP_ch, FBP_ch, F_Aldo_v, GAP_ch, compartment, q5)
  F_Aldo_v*(DHAP_ch*GAP_ch - FBP_ch/q5)/compartment;
end

function Function_for_J10_0(F6P_ch, G6P_ch, PGI_v, compartment, q14)
  PGI_v*(F6P_ch - G6P_ch/q14)/compartment;
end

function Function_for_J19_0(BPGA_ch, G3Pdh_v, GAP_ch, Light_on, Pi_ch, compartment, q3, x_NADPH_ch, x_NADP_ch, x_Proton_ch)
  Light_on*G3Pdh_v*(BPGA_ch*x_NADPH_ch*x_Proton_ch - x_NADP_ch*GAP_ch*Pi_ch/q3)/compartment;
end

function Function_for_J16_0(G1P_ch, Pi_ch, StPase_Vm, StPase_kiG1P, StPase_km, compartment)
  StPase_Vm*Pi_ch/(Pi_ch + StPase_km*(1 + G1P_ch/StPase_kiG1P))/compartment;
end

function Function_for_J5_0(GAP_ch, G_TKL_v, R5P_ch, S7P_ch, X5P_ch, compartment, q10)
  G_TKL_v*(GAP_ch*S7P_ch - X5P_ch*R5P_ch/q10)/compartment;
end

function Function_for_J7_0(Ru5P_ch, X5P_ch, X5Pepi_v, compartment, q12)
  X5Pepi_v*(X5P_ch - Ru5P_ch/q12)/compartment;
end

function Function_for_J9_0(DHAP_ch, GAP_ch, PGA_ch, Pi_ch, TP_Piap_kDHAP_ch, TP_Piap_kGAP_ch, TP_Piap_kPGA_ch, TP_Piap_kPi_ch, TP_Piap_kPi_cyt, TP_Piap_vm, compartment, x_Pi_cyt)
  TP_Piap_vm*GAP_ch/(TP_Piap_kGAP_ch*(1 + (1 + TP_Piap_kPi_cyt/x_Pi_cyt)*(Pi_ch/TP_Piap_kPi_ch + PGA_ch/TP_Piap_kPGA_ch + DHAP_ch/TP_Piap_kDHAP_ch + GAP_ch/TP_Piap_kGAP_ch)))/compartment;
end

function Function_for_J11_0(G1P_ch, G6P_ch, PGM_v, compartment, q15)
  PGM_v*(G6P_ch - G1P_ch/q15)/compartment;
end

function Function_for_J4_0(DHAP_ch, E4P_ch, E_Aldo_v, SBP_ch, compartment, q8)
  E_Aldo_v*(E4P_ch*DHAP_ch - SBP_ch/q8)/compartment;
end

function Function_for_J8_0(DHAP_ch, GAP_ch, PGA_ch, PGA_xpMult, Pi_ch, TP_Piap_kDHAP_ch, TP_Piap_kGAP_ch, TP_Piap_kPGA_ch, TP_Piap_kPi_ch, TP_Piap_kPi_cyt, TP_Piap_vm, compartment, x_Pi_cyt)
  PGA_xpMult*TP_Piap_vm*PGA_ch/(TP_Piap_kPGA_ch*(1 + (1 + TP_Piap_kPi_cyt/x_Pi_cyt)*(Pi_ch/TP_Piap_kPi_ch + PGA_ch/TP_Piap_kPGA_ch + DHAP_ch/TP_Piap_kDHAP_ch + GAP_ch/TP_Piap_kGAP_ch)))/compartment;
end

function Function_for_J12_0(ADP_ch, LR_kmADP, LR_kmPi, LR_vm, Light_on, Pi_ch, compartment)
  Light_on*LR_vm*ADP_ch*Pi_ch/((ADP_ch + LR_kmADP)*(Pi_ch + LR_kmPi))/compartment;
end

function Function_for_J14_0(ADP_ch, ATP_ch, BPGA_ch, Light_on, PGA_ch, PGK_v, compartment, q2)
  Light_on*PGK_v*(PGA_ch*ATP_ch - BPGA_ch*ADP_ch/q2)/compartment;
end

function Function_for_J6_0(R5P_ch, R5Piso_v, Ru5P_ch, compartment, q11)
  R5Piso_v*(R5P_ch - Ru5P_ch/q11)/compartment;
end

function Function_for_J15_0(ADP_ch, ATP_ch, F6P_ch, FBP_ch, G1P_ch, PGA_ch, Pi_ch, StSyn_vm, compartment, stsyn_ch_Ki, stsyn_ch_ka1, stsyn_ch_ka2, stsyn_ch_ka3, stsyn_ch_km1, stsyn_ch_km2)
  StSyn_vm*G1P_ch*ATP_ch/((G1P_ch + stsyn_ch_km1)*(1 + ADP_ch/stsyn_ch_Ki)*(ATP_ch + stsyn_ch_km2) + stsyn_ch_km2*Pi_ch/(stsyn_ch_ka1*PGA_ch) + stsyn_ch_ka2*F6P_ch + stsyn_ch_ka3*FBP_ch)/compartment;
end

function Function_for_J17_0(F6P_ch, FBP_ch, FBPase_ch_KiF6P, FBPase_ch_KiPi, FBPase_ch_km, FBPase_ch_vm, Light_on, Pi_ch, compartment)
  Light_on*FBPase_ch_vm*FBP_ch/(FBP_ch + FBPase_ch_km*(1 + F6P_ch/FBPase_ch_KiF6P + Pi_ch/FBPase_ch_KiPi))/compartment;
end

function Function_for_J18_0(DHAP_ch, GAP_ch, PGA_ch, Pi_ch, TP_Piap_kDHAP_ch, TP_Piap_kGAP_ch, TP_Piap_kPGA_ch, TP_Piap_kPi_ch, TP_Piap_kPi_cyt, TP_Piap_vm, compartment, x_Pi_cyt)
  TP_Piap_vm*DHAP_ch/(TP_Piap_kDHAP_ch*(1 + (1 + TP_Piap_kPi_cyt/x_Pi_cyt)*(Pi_ch/TP_Piap_kPi_ch + PGA_ch/TP_Piap_kPGA_ch + DHAP_ch/TP_Piap_kDHAP_ch + GAP_ch/TP_Piap_kGAP_ch)))/compartment;
end

function Function_for_J13_0(ADP_ch, ATP_ch, Light_on, PGA_ch, Pi_ch, Ru5P_ch, Ru5Pk_ch_KiADP1, Ru5Pk_ch_KiADP2, Ru5Pk_ch_KiPGA, Ru5Pk_ch_KiPi, Ru5Pk_ch_KiRuBP, Ru5Pk_ch_km1, Ru5Pk_ch_km2, Ru5Pk_ch_vm, RuBP_ch, compartment)
  Light_on*Ru5Pk_ch_vm*Ru5P_ch*ATP_ch/((Ru5P_ch + Ru5Pk_ch_km1*(1 + PGA_ch/Ru5Pk_ch_KiPGA + RuBP_ch/Ru5Pk_ch_KiRuBP + Pi_ch/Ru5Pk_ch_KiPi))*(ATP_ch*(1 + ADP_ch/Ru5Pk_ch_KiADP1) + Ru5Pk_ch_km2*(1 + ADP_ch/Ru5Pk_ch_KiADP2)))/compartment;
end

function Function_for_J20_0(Light_on, Pi_ch, SBP_ch, SBPase_ch_KiPi, SBPase_ch_km, SBPase_ch_vm, compartment)
  Light_on*SBPase_ch_vm*SBP_ch/(SBP_ch + SBPase_ch_km*(1 + Pi_ch/SBPase_ch_KiPi))/compartment;
end

model untitled()
  // CalvinCycle
  // Calvin Cycle
  // This model implements the Calvin Cycle (Petterssons original). This version was originally transcribed by Mark Poolman (Oxford Brookes) to SCAMP, and later translated into SBML using JDesigner.

  // Compartments:
  compartment compartment = 1;

  // Species:
  species x_CO2 in compartment = 1/compartment;
  species RuBP_ch in compartment = 0.33644/compartment;
  species PGA_ch in compartment = 3.35479/compartment;
  species ATP_ch in compartment = 0.49806/compartment;
  species BPGA_ch in compartment = 0.14825/compartment;
  species x_NADPH_ch in compartment = 0.21/compartment;
  species GAP_ch in compartment = 0.01334/compartment;
  species Pi_ch in compartment = 1.5662/compartment;
  species DHAP_ch in compartment = 0.29345/compartment;
  species FBP_ch in compartment = 0.02776/compartment;
  species F6P_ch in compartment = 1.36481/compartment;
  species E4P_ch in compartment = 0.41021/compartment;
  species X5P_ch in compartment = 0.00363/compartment;
  species SBP_ch in compartment = 1.56486/compartment;
  species S7P_ch in compartment = 0.00541/compartment;
  species R5P_ch in compartment = 0.00599/compartment;
  species Ru5P_ch in compartment = 0.00235/compartment;
  species x_Pi_cyt in compartment = 0.5/compartment;
  species x_GAP_cyt in compartment = 1/compartment;
  species G6P_ch in compartment = 3.1396/compartment;
  species x_NADP_ch in compartment = 0.29/compartment;
  species x_PGA_cyt in compartment = 1/compartment;
  species ADP_ch in compartment = 0.00149/compartment;
  species x_DHAP_cyt in compartment = 1/compartment;
  species x_Proton_ch in compartment = 1.26e-5/compartment;
  species G1P_ch in compartment = 0.18206/compartment;
  species x_Starch_ch in compartment = 1/compartment;

  // Reactions:
  J0: RuBP_ch + x_CO2 => 2 PGA_ch; compartment*Function_for_J0_0(FBP_ch, J0_Light_on, PGA_ch, Pi_ch, Rbco_KiFBP, Rbco_KiNADPH, Rbco_KiPGA, Rbco_KiPi, Rbco_KiSBP, Rbco_km, Rbco_vm, RuBP_ch, SBP_ch, compartment, x_NADPH_ch);  // modifiers: FBP_ch, SBP_ch, Pi_ch, x_NADPH_ch
    J0_Light_on = 1; Rbco_KiFBP = 0.04; Rbco_KiNADPH = 0.07; Rbco_KiPGA = 0.84; Rbco_KiPi = 0.9; Rbco_KiSBP = 0.075; Rbco_km = 0.02; Rbco_vm = 340;
  J1: GAP_ch -> DHAP_ch; compartment*Function_for_J1_0(DHAP_ch, GAP_ch, TPI_v, compartment, q4);
    TPI_v = 5000000000; q4 = 1;
  J2: GAP_ch + DHAP_ch -> FBP_ch; compartment*Function_for_J2_0(DHAP_ch, FBP_ch, F_Aldo_v, GAP_ch, compartment, q5);
    F_Aldo_v = 5000000000; q5 = 1;
  J3: GAP_ch + F6P_ch -> X5P_ch + E4P_ch; compartment*Function_for_J3_0(E4P_ch, F6P_ch, F_TKL_v, GAP_ch, X5P_ch, compartment, q7);
    F_TKL_v = 5000000000; q7 = 1;
  J4: DHAP_ch + E4P_ch -> SBP_ch; compartment*Function_for_J4_0(DHAP_ch, E4P_ch, E_Aldo_v, SBP_ch, compartment, q8);
    E_Aldo_v = 5000000000; q8 = 13;
  J5: S7P_ch + GAP_ch -> R5P_ch + X5P_ch; compartment*Function_for_J5_0(GAP_ch, G_TKL_v, R5P_ch, S7P_ch, X5P_ch, compartment, q10);
    G_TKL_v = 5000000000; q10 = 1;
  J6: R5P_ch -> Ru5P_ch; compartment*Function_for_J6_0(R5P_ch, R5Piso_v, Ru5P_ch, compartment, q11);
    R5Piso_v = 5000000000; q11 = 1;
  J7: X5P_ch -> Ru5P_ch; compartment*Function_for_J7_0(Ru5P_ch, X5P_ch, X5Pepi_v, compartment, q12);
    X5Pepi_v = 5000000000; q12 = 1;
  J8: x_Pi_cyt + PGA_ch => x_PGA_cyt + Pi_ch; compartment*Function_for_J8_0(DHAP_ch, GAP_ch, PGA_ch, PGA_xpMult, Pi_ch, J8_TP_Piap_kDHAP_ch, J8_TP_Piap_kGAP_ch, J8_TP_Piap_kPGA_ch, J8_TP_Piap_kPi_ch, J8_TP_Piap_kPi_cyt, J8_TP_Piap_vm, compartment, x_Pi_cyt);  // modifiers: DHAP_ch, GAP_ch
    PGA_xpMult = 0.2; J8_TP_Piap_kDHAP_ch = 0.077; J8_TP_Piap_kGAP_ch = 0.075; J8_TP_Piap_kPGA_ch = 0.25; J8_TP_Piap_kPi_ch = 0.63; J8_TP_Piap_kPi_cyt = 0.74; J8_TP_Piap_vm = 250;
  J9: x_Pi_cyt + GAP_ch => x_GAP_cyt + Pi_ch; compartment*Function_for_J9_0(DHAP_ch, GAP_ch, PGA_ch, Pi_ch, J9_TP_Piap_kDHAP_ch, J9_TP_Piap_kGAP_ch, J9_TP_Piap_kPGA_ch, J9_TP_Piap_kPi_ch, J9_TP_Piap_kPi_cyt, J9_TP_Piap_vm, compartment, x_Pi_cyt);  // modifiers: PGA_ch, DHAP_ch
    J9_TP_Piap_kDHAP_ch = 1; J9_TP_Piap_kGAP_ch = 1; J9_TP_Piap_kPGA_ch = 1; J9_TP_Piap_kPi_ch = 1; J9_TP_Piap_kPi_cyt = 1; J9_TP_Piap_vm = 0;
  J10: F6P_ch -> G6P_ch; compartment*Function_for_J10_0(F6P_ch, G6P_ch, PGI_v, compartment, q14);
    PGI_v = 5000000000; q14 = 1;
  J11: G6P_ch -> G1P_ch; compartment*Function_for_J11_0(G1P_ch, G6P_ch, PGM_v, compartment, q15);
    PGM_v = 5000000000; q15 = 1;
  J12: Pi_ch + ADP_ch => ATP_ch; compartment*Function_for_J12_0(ADP_ch, LR_kmADP, LR_kmPi, LR_vm, J12_Light_on, Pi_ch, compartment);
    LR_kmADP = 0.014; LR_kmPi = 0.3; LR_vm = 1500; J12_Light_on = 0;
  J13: Ru5P_ch + ATP_ch => RuBP_ch + ADP_ch; compartment*Function_for_J13_0(ADP_ch, ATP_ch, J13_Light_on, PGA_ch, Pi_ch, Ru5P_ch, Ru5Pk_ch_KiADP1, Ru5Pk_ch_KiADP2, Ru5Pk_ch_KiPGA, Ru5Pk_ch_KiPi, Ru5Pk_ch_KiRuBP, Ru5Pk_ch_km1, Ru5Pk_ch_km2, Ru5Pk_ch_vm, RuBP_ch, compartment);  // modifiers: PGA_ch, Pi_ch
    J13_Light_on = 0; Ru5Pk_ch_KiADP1 = 2.5; Ru5Pk_ch_KiADP2 = 0.4; Ru5Pk_ch_KiPGA = 2; Ru5Pk_ch_KiPi = 4; Ru5Pk_ch_KiRuBP = 0.7; Ru5Pk_ch_km1 = 0.05; Ru5Pk_ch_km2 = 0.05; Ru5Pk_ch_vm = 10000;
  J14: PGA_ch + ATP_ch => BPGA_ch + ADP_ch; compartment*Function_for_J14_0(ADP_ch, ATP_ch, BPGA_ch, J14_Light_on, PGA_ch, PGK_v, compartment, q2);
    J14_Light_on = 0; PGK_v = 5000000000; q2 = 0.00031;
  J15: ATP_ch + G1P_ch => x_Starch_ch + ADP_ch + Pi_ch; compartment*Function_for_J15_0(ADP_ch, ATP_ch, F6P_ch, FBP_ch, G1P_ch, PGA_ch, Pi_ch, StSyn_vm, compartment, stsyn_ch_Ki, stsyn_ch_ka1, stsyn_ch_ka2, stsyn_ch_ka3, stsyn_ch_km1, stsyn_ch_km2);  // modifiers: PGA_ch, F6P_ch, FBP_ch
    StSyn_vm = 40; stsyn_ch_Ki = 10; stsyn_ch_ka1 = 0.1; stsyn_ch_ka2 = 0.02; stsyn_ch_ka3 = 0.02; stsyn_ch_km1 = 0.08; stsyn_ch_km2 = 0.08;
  J16: x_Starch_ch + Pi_ch => G1P_ch; compartment*Function_for_J16_0(G1P_ch, Pi_ch, StPase_Vm, StPase_kiG1P, StPase_km, compartment);
    StPase_Vm = 40; StPase_kiG1P = 3.12; StPase_km = 5;
  J17: FBP_ch + Pi_ch => F6P_ch; compartment*Function_for_J17_0(F6P_ch, FBP_ch, FBPase_ch_KiF6P, FBPase_ch_KiPi, FBPase_ch_km, FBPase_ch_vm, J17_Light_on, Pi_ch, compartment);
    FBPase_ch_KiF6P = 0.7; FBPase_ch_KiPi = 12; FBPase_ch_km = 0.03; FBPase_ch_vm = 200; J17_Light_on = 0;
  J18: x_Pi_cyt + DHAP_ch => x_DHAP_cyt + Pi_ch; compartment*Function_for_J18_0(DHAP_ch, GAP_ch, PGA_ch, Pi_ch, J18_TP_Piap_kDHAP_ch, J18_TP_Piap_kGAP_ch, J18_TP_Piap_kPGA_ch, J18_TP_Piap_kPi_ch, J18_TP_Piap_kPi_cyt, J18_TP_Piap_vm, compartment, x_Pi_cyt);  // modifiers: PGA_ch, GAP_ch
    J18_TP_Piap_kDHAP_ch = 1; J18_TP_Piap_kGAP_ch = 1; J18_TP_Piap_kPGA_ch = 1; J18_TP_Piap_kPi_ch = 1; J18_TP_Piap_kPi_cyt = 1; J18_TP_Piap_vm = 0;
  J19: x_NADPH_ch + BPGA_ch + x_Proton_ch => x_NADP_ch + GAP_ch + Pi_ch; compartment*Function_for_J19_0(BPGA_ch, G3Pdh_v, GAP_ch, J19_Light_on, Pi_ch, compartment, q3, x_NADPH_ch, x_NADP_ch, x_Proton_ch);
    G3Pdh_v = 5000000000; J19_Light_on = 0; q3 = 1;
  J20: SBP_ch => Pi_ch + S7P_ch; compartment*Function_for_J20_0(J20_Light_on, Pi_ch, SBP_ch, SBPase_ch_KiPi, SBPase_ch_km, SBPase_ch_vm, compartment);
    J20_Light_on = 0; SBPase_ch_KiPi = 12; SBPase_ch_km = 0.013; SBPase_ch_vm = 40;
end
