// SBML level 2 version 3
// Copyright (C) 2017 by Pedro Mendes, Virginia Tech Intellectual
// Properties, Inc., University of Heidelberg, and University of
// of Connecticut School of Medicine.
// All rights reserved.
// Copyright (C) 2014 - 2016 by Pedro Mendes, Virginia Tech Intellectual
// Properties, Inc., University of Heidelberg, and The University
// of Manchester.
// All rights reserved.

model NF_kB_signaling()
  // NF-kB signaling
  // Model of oscillating NF-kappaB signaling
  // This is a model of the NF-kappaB signaling pathway oscillations, as published by Nelson et al. (2004), following the one of Hoffman et al. (2002).
  // References
  // NELSON, D.E., IHEKWABA, A.E., et al.(2004). Oscillations in NF-kappaB signaling control the dynamics of gene expression. Science 306, 704-708.
  // HOFFMANN, A., LEVCHENKO, A., SCOTT, M. L. & BALTIMORE, D. (2002). The IkappaB-NF-kappaB signaling module: temporal control and selective gene activation. Science 298, 1241-1245.
  // CHEN, L. F., FISCHLE, W., VERDIN, E. & GREENE, W. C. (2001). Duration of nuclear NF-kappa B action regulated by reversible acetylation. Science 293, 1653-1657.
  // JENSEN, L. E. & WHITEHEAD, A. S. (1998). Regulation of serum amyloid A protein expression during the acute-phase response. Biochem J 334, 489-503.

  // Compartments:
  compartment compartment = 1;
  compartment cytoplasm = 1;
  compartment nucleus = 1;

  // Species:
  species IkBa in compartment = 0.1896637;
  species NF_kB in compartment = 0.0002507471; NF_kB is "NF-kB";
  species IkBa_NF_kB in compartment = 0.08333273; IkBa_NF_kB is "IkBa-NF-kB";
  species IkBb in compartment = 0.0216351;
  species IkBb_NF_kB in compartment = 0.008304822; IkBb_NF_kB is "IkBb-NF-kB";
  species IkBe in compartment = 0.01543628;
  species IkBe_NF_kB in compartment = 0.005925351; IkBe_NF_kB is "IkBe-NF-kB";
  species IKKIkBa in compartment = 0;
  species IKKIkBa_NF_kB in compartment = 0; IKKIkBa_NF_kB is "IKKIkBa-NF-kB";
  species IKK in compartment = 0.1;
  species IKKIkBb in compartment = 0;
  species IKKIkBb_NF_kB in compartment = 0; IKKIkBb_NF_kB is "IKKIkBb-NF-kB";
  species IKKIkBe in compartment = 0;
  species IKKIkBe_NF_kB in compartment = 0; IKKIkBe_NF_kB is "IKKIkBe-NF-kB";
  species NF_kBn in compartment = 0.0002170219; NF_kBn is "NF-kBn";
  species IkBan in compartment = 0.1885983;
  species IkBan_NF_kBn in compartment = 0.001431059; IkBan_NF_kBn is "IkBan-NF-kBn";
  species IkBbn in compartment = 0.01650483;
  species IkBbn_NF_kBn in compartment = 0.0003141336; IkBbn_NF_kBn is "IkBbn-NF-kBn";
  species IkBen in compartment = 0.01177592;
  species IkBen_NF_kBn in compartment = 0.000224129; IkBen_NF_kBn is "IkBen-NF-kBn";
  species IkBa_t in compartment = 0.005502697; IkBa_t is "IkBa-t";
  species IkBb_t in compartment = 0.0006357143; IkBb_t is "IkBb-t";
  species IkBe_t in compartment = 0.0004535714; IkBe_t is "IkBe-t";
  species $sink in compartment = 0;
  species $source in compartment = 1;

  // Reactions:
  IkBaNF_kB_association: IkBa + NF_kB => IkBa_NF_kB; compartment*IkBaNF_kB_association_k1*IkBa*NF_kB; IkBaNF_kB_association is "IkBaNF-kB association";
    IkBaNF_kB_association_k1 = 0.5 unit_0;
  IkBa_NF_kB_dissociation: IkBa_NF_kB => NF_kB + IkBa; compartment*IkBa_NF_kB_dissociation_k1*IkBa_NF_kB; IkBa_NF_kB_dissociation is "IkBa-NF-kB dissociation";
    IkBa_NF_kB_dissociation_k1 = 0.0005 unit_1;
  IkBb_NF_kB_association: IkBb + NF_kB => IkBb_NF_kB; compartment*IkBb_NF_kB_association_k1*IkBb*NF_kB; IkBb_NF_kB_association is "IkBb-NF-kB association";
    IkBb_NF_kB_association_k1 = 0.5 unit_0;
  IkBb_NF_kB_dissociation: IkBb_NF_kB => NF_kB + IkBb; compartment*IkBb_NF_kB_dissociation_k1*IkBb_NF_kB; IkBb_NF_kB_dissociation is "IkBb-NF-kB dissociation";
    IkBb_NF_kB_dissociation_k1 = 0.0005 unit_1;
  IkBe_NF_kB_association: IkBe + NF_kB => IkBe_NF_kB; compartment*IkBe_NF_kB_association_k1*IkBe*NF_kB; IkBe_NF_kB_association is "IkBe-NF-kB association";
    IkBe_NF_kB_association_k1 = 0.5 unit_0;
  IkBe_NF_kB_dissociation: IkBe_NF_kB => NF_kB + IkBe; compartment*IkBe_NF_kB_dissociation_k1*IkBe_NF_kB; IkBe_NF_kB_dissociation is "IkBe-NF-kB dissociation";
    IkBe_NF_kB_dissociation_k1 = 0.0005 unit_1;
  IKKIkBa_NF_kB_association: IKKIkBa + NF_kB => IKKIkBa_NF_kB; compartment*IKKIkBa_NF_kB_association_k1*IKKIkBa*NF_kB; IKKIkBa_NF_kB_association is "IKKIkBa-NF-kB association";
    IKKIkBa_NF_kB_association_k1 = 0.5 unit_0;
  IKKIkBa_NF_kB_dissociation: IKKIkBa_NF_kB => NF_kB + IKKIkBa; compartment*IKKIkBa_NF_kB_dissociation_k1*IKKIkBa_NF_kB; IKKIkBa_NF_kB_dissociation is "IKKIkBa-NF-kB dissociation";
    IKKIkBa_NF_kB_dissociation_k1 = 0.0005 unit_1;
  IKKIkBa_NF_kB_catalysis: IKKIkBa_NF_kB => IKK + NF_kB; compartment*IKKIkBa_NF_kB_catalysis_k1*IKKIkBa_NF_kB; IKKIkBa_NF_kB_catalysis is "IKKIkBa-NF-kB catalysis";
    IKKIkBa_NF_kB_catalysis_k1 = 0.0204 unit_1;
  IKKIkBb_NF_kB_association: IKKIkBb + NF_kB => IKKIkBb_NF_kB; compartment*IKKIkBb_NF_kB_association_k1*IKKIkBb*NF_kB; IKKIkBb_NF_kB_association is "IKKIkBb-NF-kB association";
    IKKIkBb_NF_kB_association_k1 = 0.5 unit_0;
  IKKIkBb_NF_kB_dissociation: IKKIkBb_NF_kB => NF_kB + IKKIkBb; compartment*IKKIkBb_NF_kB_dissociation_k1*IKKIkBb_NF_kB; IKKIkBb_NF_kB_dissociation is "IKKIkBb-NF-kB dissociation";
    IKKIkBb_NF_kB_dissociation_k1 = 0.0005 unit_1;
  IKKIkBb_NF_kB_catalysis: IKKIkBb_NF_kB => IKK + NF_kB; compartment*IKKIkBb_NF_kB_catalysis_k1*IKKIkBb_NF_kB; IKKIkBb_NF_kB_catalysis is "IKKIkBb-NF-kB catalysis";
    IKKIkBb_NF_kB_catalysis_k1 = 0.0075 unit_1;
  IKKIkBe_NF_kB_association: IKKIkBe + NF_kB => IKKIkBe_NF_kB; compartment*IKKIkBe_NF_kB_association_k1*IKKIkBe*NF_kB; IKKIkBe_NF_kB_association is "IKKIkBe-NF-kB association";
    IKKIkBe_NF_kB_association_k1 = 0.5 unit_0;
  IKKIkBe_NF_kB_dissociation: IKKIkBe_NF_kB => NF_kB + IKKIkBe; compartment*IKKIkBe_NF_kB_dissociation_k1*IKKIkBe_NF_kB; IKKIkBe_NF_kB_dissociation is "IKKIkBe-NF-kB dissociation";
    IKKIkBe_NF_kB_dissociation_k1 = 0.0005 unit_1;
  IKKIkBe_NF_kB_catalysis: IKKIkBe_NF_kB => IKK + NF_kB; compartment*IKKIkBe_NF_kB_catalysis_k1*IKKIkBe_NF_kB; IKKIkBe_NF_kB_catalysis is "IKKIkBe-NF-kB catalysis";
    IKKIkBe_NF_kB_catalysis_k1 = 0.011 unit_1;
  IkBa_constituitive_degradation__complexed_to_NF_kB: IkBa_NF_kB => NF_kB; compartment*IkBa_constituitive_degradation__complexed_to_NF_kB_k1*IkBa_NF_kB; IkBa_constituitive_degradation__complexed_to_NF_kB is "IkBa constituitive degradation (complexed to NF-kB)";
    IkBa_constituitive_degradation__complexed_to_NF_kB_k1 = 2.25e-5 unit_1;
  IkBb_constituitive_degradation__complexed_to_NF_kB: IkBb_NF_kB => NF_kB; compartment*IkBb_constituitive_degradation__complexed_to_NF_kB_k1*IkBb_NF_kB; IkBb_constituitive_degradation__complexed_to_NF_kB is "IkBb constituitive degradation (complexed to NF-kB)";
    IkBb_constituitive_degradation__complexed_to_NF_kB_k1 = 2.25e-5 unit_1;
  IkBe_constituitive_degradation__complexed_to_NF_kB: IkBe_NF_kB => NF_kB; compartment*IkBe_constituitive_degradation__complexed_to_NF_kB_k1*IkBe_NF_kB; IkBe_constituitive_degradation__complexed_to_NF_kB is "IkBe constituitive degradation (complexed to NF-kB)";
    IkBe_constituitive_degradation__complexed_to_NF_kB_k1 = 2.25e-5 unit_1;
  NF_kB_nuclear_import: NF_kB => NF_kBn; compartment*NF_kB_nuclear_import_k1*NF_kB; NF_kB_nuclear_import is "NF-kB nuclear import";
    NF_kB_nuclear_import_k1 = 0.09 unit_1;
  NF_kB_nuclear_export: NF_kBn => NF_kB; compartment*NF_kB_nuclear_export_k1*NF_kBn; NF_kB_nuclear_export is "NF-kB nuclear export";
    NF_kB_nuclear_export_k1 = 8e-5 unit_1;
  IkBa_NF_kB_nuclear_association: IkBan + NF_kBn => IkBan_NF_kBn; compartment*IkBa_NF_kB_nuclear_association_k1*IkBan*NF_kBn; IkBa_NF_kB_nuclear_association is "IkBa-NF-kB nuclear association";
    IkBa_NF_kB_nuclear_association_k1 = 0.5 unit_0;
  IkBa_NF_kB_nuclear_dissociation: IkBan_NF_kBn => NF_kBn + IkBan; compartment*IkBa_NF_kB_nuclear_dissociation_k1*IkBan_NF_kBn; IkBa_NF_kB_nuclear_dissociation is "IkBa-NF-kB nuclear dissociation";
    IkBa_NF_kB_nuclear_dissociation_k1 = 0.0005 unit_1;
  IkBb_NF_kB_nuclear_association: IkBbn + NF_kBn => IkBbn_NF_kBn; compartment*IkBb_NF_kB_nuclear_association_k1*IkBbn*NF_kBn; IkBb_NF_kB_nuclear_association is "IkBb-NF-kB nuclear association";
    IkBb_NF_kB_nuclear_association_k1 = 0.5 unit_0;
  IkBb_NF_kB_nuclear_dissociation: IkBbn_NF_kBn => NF_kBn + IkBbn; compartment*IkBb_NF_kB_nuclear_dissociation_k1*IkBbn_NF_kBn; IkBb_NF_kB_nuclear_dissociation is "IkBb-NF-kB nuclear dissociation";
    IkBb_NF_kB_nuclear_dissociation_k1 = 0.0005 unit_1;
  IkBe_NF_kB_nuclear_association: IkBen + NF_kBn => IkBen_NF_kBn; compartment*IkBe_NF_kB_nuclear_association_k1*IkBen*NF_kBn; IkBe_NF_kB_nuclear_association is "IkBe-NF-kB nuclear association";
    IkBe_NF_kB_nuclear_association_k1 = 0.5 unit_0;
  IkBe_NF_kB_nuclear_dissociation: IkBen_NF_kBn => NF_kBn + IkBen; compartment*IkBe_NF_kB_nuclear_dissociation_k1*IkBen_NF_kBn; IkBe_NF_kB_nuclear_dissociation is "IkBe-NF-kB nuclear dissociation";
    IkBe_NF_kB_nuclear_dissociation_k1 = 0.0005 unit_1;
  constituitive_IkBa_mRNA_synthesis: $source => IkBa_t; compartment*constituitive_IkBa_mRNA_synthesis_k1*source;
    constituitive_IkBa_mRNA_synthesis_k1 = 1.54e-6 unit_1;
  IkBa_Inducible_mRNA_synthesis: 2 NF_kBn => IkBa_t + 2 NF_kBn; compartment*IkBa_Inducible_mRNA_synthesis_k1*NF_kBn^2;
    IkBa_Inducible_mRNA_synthesis_k1 = 0.0165 unit_0;
  IkBa_mRNA_degradation: IkBa_t => $sink; compartment*IkBa_mRNA_degradation_k1*IkBa_t;
    IkBa_mRNA_degradation_k1 = 0.00028 unit_1;
  constituitive_IkBb_mRNA_synthesis: $source => IkBb_t; compartment*constituitive_IkBb_mRNA_synthesis_k1*source;
    constituitive_IkBb_mRNA_synthesis_k1 = 1.78e-7 unit_1;
  IkBb_mRNA_degradation: IkBb_t => $sink; compartment*IkBb_mRNA_degradation_k1*IkBb_t;
    IkBb_mRNA_degradation_k1 = 0.00028 unit_1;
  constituitive_IkBe_mRNA_synthesis: $source => IkBe_t; compartment*constituitive_IkBe_mRNA_synthesis_k1*source;
    constituitive_IkBe_mRNA_synthesis_k1 = 1.27e-7 unit_1;
  IkBe_mRNA_degradation: IkBe_t => $sink; compartment*IkBe_mRNA_degradation_k1*IkBe_t;
    IkBe_mRNA_degradation_k1 = 0.00028 unit_1;
  IKKIkBa_association: IKK + IkBa => IKKIkBa; compartment*IKKIkBa_association_k1*IKK*IkBa;
    IKKIkBa_association_k1 = 0.0225 unit_0;
  IKKIkBa_dissociation: IKKIkBa => IKK + IkBa; compartment*IKKIkBa_dissociation_k1*IKKIkBa;
    IKKIkBa_dissociation_k1 = 0.00125 unit_1;
  IkBa_translation_rate: IkBa_t => IkBa + IkBa_t; compartment*IkBa_translation_rate_k1*IkBa_t;
    IkBa_translation_rate_k1 = 0.00408 unit_1;
  constitutive_IkBa_degradation__free: IkBa => $sink; compartment*constitutive_IkBa_degradation__free_k1*IkBa; constitutive_IkBa_degradation__free is "constitutive IkBa degradation (free)";
    constitutive_IkBa_degradation__free_k1 = 0.000113 unit_1;
  IkBa_nuclear_import: IkBa => IkBan; compartment*IkBa_nuclear_import_k1*IkBa;
    IkBa_nuclear_import_k1 = 0.0003 unit_1;
  IkBa_nuclear_export: IkBan => IkBa; compartment*IkBa_nuclear_export_k1*IkBan;
    IkBa_nuclear_export_k1 = 0.0002 unit_1;
  IKKIkBb_association: IKK + IkBb => IKKIkBb; compartment*IKKIkBb_association_k1*IKK*IkBb;
    IKKIkBb_association_k1 = 0.006 unit_0;
  IKKIkBb_dissociation: IKKIkBb => IKK + IkBb; compartment*IKKIkBb_dissociation_k1*IKKIkBb;
    IKKIkBb_dissociation_k1 = 0.00175 unit_1;
  IkBb_translation_rate: IkBb_t => IkBb + IkBb_t; compartment*IkBb_translation_rate_k1*IkBb_t;
    IkBb_translation_rate_k1 = 0.00408 unit_1;
  constitutive_IkBb_degradation__free: IkBb => $sink; compartment*constitutive_IkBb_degradation__free_k1*IkBb; constitutive_IkBb_degradation__free is "constitutive IkBb degradation (free)";
    constitutive_IkBb_degradation__free_k1 = 0.000113 unit_1;
  IkBb_nuclear_import: IkBb => IkBbn; compartment*IkBb_nuclear_import_k1*IkBb;
    IkBb_nuclear_import_k1 = 0.00015 unit_1;
  IkBb_nuclear_export: IkBbn => IkBb; compartment*IkBb_nuclear_export_k1*IkBbn;
    IkBb_nuclear_export_k1 = 0.0001 unit_1;
  IKKIkBe_association: IKK + IkBe => IKKIkBe; compartment*IKKIkBe_association_k1*IKK*IkBe;
    IKKIkBe_association_k1 = 0.009 unit_0;
  IKKIkBe_dissociation: IKKIkBe => IKK + IkBe; compartment*IKKIkBe_dissociation_k1*IKKIkBe;
    IKKIkBe_dissociation_k1 = 0.00175 unit_1;
  IkBe_translation_rate: IkBe_t => IkBe + IkBe_t; compartment*IkBe_translation_rate_k1*IkBe_t;
    IkBe_translation_rate_k1 = 0.00408 unit_1;
  constitutive_IkBe_degradation__free: IkBe => $sink; compartment*constitutive_IkBe_degradation__free_k1*IkBe; constitutive_IkBe_degradation__free is "constitutive IkBe degradation (free)";
    constitutive_IkBe_degradation__free_k1 = 0.000113 unit_1;
  IkBe_nuclear_import: IkBe => IkBen; compartment*IkBe_nuclear_import_k1*IkBe;
    IkBe_nuclear_import_k1 = 0.00015 unit_1;
  IkBe_nuclear_export: IkBen => IkBe; compartment*IkBe_nuclear_export_k1*IkBen;
    IkBe_nuclear_export_k1 = 0.0001 unit_1;
  IKK_IkBaNF_kB_association: IKK + IkBa_NF_kB => IKKIkBa_NF_kB; compartment*IKK_IkBaNF_kB_association_k1*IKK*IkBa_NF_kB; IKK_IkBaNF_kB_association is "IKK-IkBaNF-kB association";
    IKK_IkBaNF_kB_association_k1 = 0.185 unit_0;
  IKK_IkBaNF_kB_dissociation: IKKIkBa_NF_kB => IKK + IkBa_NF_kB; compartment*IKK_IkBaNF_kB_dissociation_k1*IKKIkBa_NF_kB; IKK_IkBaNF_kB_dissociation is "IKK-IkBaNF-kB dissociation";
    IKK_IkBaNF_kB_dissociation_k1 = 0.00125 unit_1;
  IkBa_NF_kB_nuclear_export: IkBan_NF_kBn => IkBa_NF_kB; compartment*IkBa_NF_kB_nuclear_export_k1*IkBan_NF_kBn; IkBa_NF_kB_nuclear_export is "IkBa-NF-kB nuclear export";
    IkBa_NF_kB_nuclear_export_k1 = 0.0138 unit_1;
  IKK_IkBbNF_kB_association: IKK + IkBb_NF_kB => IKKIkBb_NF_kB; compartment*IKK_IkBbNF_kB_association_k1*IKK*IkBb_NF_kB; IKK_IkBbNF_kB_association is "IKK-IkBbNF-kB association";
    IKK_IkBbNF_kB_association_k1 = 0.048 unit_0;
  IKK_IkBbNF_kB_dissociation: IKKIkBb_NF_kB => IKK + IkBb_NF_kB; compartment*IKK_IkBbNF_kB_dissociation_k1*IKKIkBb_NF_kB; IKK_IkBbNF_kB_dissociation is "IKK-IkBbNF-kB dissociation";
    IKK_IkBbNF_kB_dissociation_k1 = 0.00175 unit_1;
  IkBb_NF_kB_nuclear_export: IkBbn_NF_kBn => IkBb_NF_kB; compartment*IkBb_NF_kB_nuclear_export_k1*IkBbn_NF_kBn; IkBb_NF_kB_nuclear_export is "IkBb-NF-kB nuclear export";
    IkBb_NF_kB_nuclear_export_k1 = 0.0052 unit_1;
  IKK_IkBeNF_kB_association: IKK + IkBe_NF_kB => IKKIkBe_NF_kB; compartment*IKK_IkBeNF_kB_association_k1*IKK*IkBe_NF_kB; IKK_IkBeNF_kB_association is "IKK-IkBeNF-kB association";
    IKK_IkBeNF_kB_association_k1 = 0.07 unit_0;
  IKK_IkBeNF_kB_dissociation: IKKIkBe_NF_kB => IKK + IkBe_NF_kB; compartment*IKK_IkBeNF_kB_dissociation_k1*IKKIkBe_NF_kB; IKK_IkBeNF_kB_dissociation is "IKK-IkBeNF-kB dissociation";
    IKK_IkBeNF_kB_dissociation_k1 = 0.00175 unit_1;
  IkBe_NF_kB_nuclear_export: IkBen_NF_kBn => IkBe_NF_kB; compartment*IkBe_NF_kB_nuclear_export_k1*IkBen_NF_kBn; IkBe_NF_kB_nuclear_export is "IkBe-NF-kB nuclear export";
    IkBe_NF_kB_nuclear_export_k1 = 0.0052 unit_1;
  slow_adaptation: IKK => $sink; compartment*slow_adaptation_k1*IKK;
    slow_adaptation_k1 = 0.00012 unit_1;
  IKKIkBa_catalysis: IKKIkBa => IKK; compartment*IKKIkBa_catalysis_k1*IKKIkBa;
    IKKIkBa_catalysis_k1 = 0.00407 unit_1;
  IKKIkBb_catalysis: IKKIkBb => IKK; compartment*IKKIkBb_catalysis_k1*IKKIkBb;
    IKKIkBb_catalysis_k1 = 0.0015 unit_1;
  IKKIkBe_catalysis: IKKIkBe => IKK; compartment*IKKIkBe_catalysis_k1*IKKIkBe;
    IKKIkBe_catalysis_k1 = 0.0022 unit_1;

  // Unit definitions:
  unit volume = 1e-3 litre;
  unit substance = 1e-6 mole;
  unit unit_0 = 1e-3 litre / (1e-6 mole * second);
  unit unit_1 = 1 / second;
end
