// SBML level 2 version 1
// Copyright (C) 2014 by Pedro Mendes, Virginia Tech Intellectual
// Properties, Inc., University of Heidelberg, and The University
// of Manchester.
// All rights reserved.
// Created on: 1/11/2014 8:29:53 AM
// Model Starts Here

model oscli()
  // Oscli (Heinrich model)

  // Compartments:
  compartment compartment = 1;

  // Species:
  species S1 in compartment = 0;
  species S2 in compartment = 1;
  species $X0 in compartment = 1;
  species $X1 in compartment = 0;
  species $X2 in compartment = 0;

  // Parameters:
  J0_v0 = 8;
  J1_k3 = 0;
  J2_k1 = 1;
  J2_k_1 = 0;
  J2_c = 1;
  J2_q = 3;
  J3_k2 = 5;

  // Reactions:
  J0: $X0 => S1; J0_v0;
  J1: S1 => $X1; J1_k3*S1;
  J2: S1 => S2; (J2_k1*S1 - J2_k_1*S2)*(1 + J2_c*S2^J2_q);
  J3: S2 => $X2; J3_k2*S2;
end
