// SBML level 1 version 1
// Copyright (C) 2010 - 2013 by Pedro Mendes, Virginia Tech Intellectual
// Properties, Inc., University of Heidelberg, and The University
// of Manchester.
// All rights reserved.
// Copyright (C) 2008 - 2009 by Pedro Mendes, Virginia Tech Intellectual
// Properties, Inc., EML Research, gGmbH, University of Heidelberg,
// and The University of Manchester.
// All rights reserved.
// Copyright (C) 2004 - 2007 by Pedro Mendes, Virginia Tech Intellectual
// Properties, Inc. and EML Research, gGmbH.
// All rights reserved.

model NovakTyson1997CellModel()
  // Novak and Tyson Cell Cycle Model (1997)
  // Citation
  // Novak B, tyson JJ (1997) Modeling the control of DNA replication in fission yeast, PNAS, USA, 94:9147-9152. http://www.pnas.org/cgi/content/abstract/ 94/17/9147
  // Description
  // A cell cycle model with 13 dynamic variables ( Cdc25,G1K,G1R=[Cig2/Cdc2/Rum1],G2K=[Cdc13/Cdc2],G2R=[Cdc13/Cdc2/Rum1],IE=[ Intermediary enzyme],mass,PG2=[Cdc13/P-Cdc2],PG2R=[Cdc13/P-Cdc2/Rum1],R=[ Rum1],UbE,UbE2, Wee1} and two auxilllary variables MPF = G2K+ beta*PG2, SPF=MPF+alpha*G1K+Cig1, (alpha, beta, Cig1 constants) . NOTE: The following switches in the published model are NOT described by the SBML: "Switches(i) When SPF crosses 0.1 from below, S phase is initiated (Start).(ii) When UbE crosses 0.1 from above, the cell divides functionally (mass->mass/2), although visible cytokinesis may be delayed.(iii) 60 min after Start,kp is divided by 2, and at cell division kp is multiplied by 2." ( from Table 1 of the cited reference).
  // Rate constant Reaction
  // 0 G1R -> R
  // 0.00175 EmptySet -> G1K
  // 0.00495*mass[t] EmptySet -> mass
  // 0.0075*(1 - UbE[t]) + 0.25*UbE[t] G2K -> EmptySet
  // 0.0075*(1 - UbE[t]) + 0.25*UbE[t] PG2 -> EmptySet
  // 0.015 EmptySet -> G2K
  // 0.025*(1 - Cdc25[t]) + 0.5*Cdc25[t] PG2 -> G2K
  // 0.035*(1 - Wee1[t]) + 0.35*Wee1[t] G2K -> PG2
  // 0.0375*(1 - UbE2[t]) + 7.5*UbE2[t] G1K -> EmptySet
  // 0.05 + 0.0075*(1 - UbE[t]) + 0.25*UbE[t] G2R -> R
  // 0.05 + 0.0075*(1 - UbE[t]) + 0.25*UbE[t] PG2R -> R
  // 0.09375 EmptySet -> R
  // 0.1 G1R -> G1K + R
  // 0.1 G2R -> G2K + R
  // 0.1 PG2R -> PG2 + R
  // 0.1875 G1R -> G1K
  // 0.1875 G2R -> G2K
  // 0.1875 PG2R -> PG2
  // 0.1875 R -> EmptySet
  // 0.4 (G2K[t] + 0.05 PG2[t]) = unassigned ( hill vmax) 1 - IE |-> IE
  // 10 G1K + R -> G1R
  // 100 G2K + R -> G2R
  // 100 PG2 + R -> PG2R
  // 3.25 (0.25 G1K[t] + G2K[t] + 0.05 PG2[t]) = unassigned (hill vmax) mass + R |-> mass + EmptySet
  // G2K[t] + 0.05 PG2[t] = unassigned ( hill vmax) 1 - Cdc25 |-> Cdc25
  // G2K[t] + 0.05 PG2[t] = unassigned ( hill vmax) 1 - UbE2 |-> UbE2
  // G2K[t] + 0.05 PG2[t] = unassigned ( hill vmax) Wee1 |-> EmptySet
  // Variable IC ODE
  // Cdc25 0 Cdc25'[t] == -((kcr*Cdc25[t])/(Kmcr + Cdc25[t])) + (kc*(1 - Cdc25[t])*(G2K[t] + beta*PG2[t]))/(1 + Kmc - Cdc25[t])
  // G1K 0 G1K'[t] == k5 + k4*G1R[t] + k8r*G1R[t] - k8*G1K[t]*R[t] - G1K[t]*(V6p*(1 - UbE2[t]) + V6*UbE2[t])
  // G1R 0 G1R'[t] == -(k4*G1R[t]) - k6p*G1R[t] - k8r* G1R[t] + k8*G1K[t]*R[t]
  // G2K 0 G2K'[t] == k1 + k4*G2R[t] + k7r*G2R[t] + (V25p*(1 - Cdc25[t]) + V25*Cdc25[t])*PG2[t] - k7*G2K[t]*R[t] - G2K[t]*(V2p*(1 - UbE[t]) + V2*UbE[t]) - G2K[t]*(Vwp*(1 - Wee1[t]) + Vw* Wee1[t])
  // G2R 0 G2R'[t] == -(k4*G2R[t]) - k7r*G2R[t] + k7*G2K[ t]*R[t] - G2R[t]*(k2p + V2p*(1 - UbE[t]) + V2*UbE[t])
  // IE 0 IE'[t] == -((kir*IE[t])/(Kmir + IE[t])) + (ki* (1 - IE[t])*(G2K[t] + beta*PG2[t]))/(1 + Kmi - IE[t])
  // mass 0.4 mass'[t] == mu*mass[t]
  // PG2 0 PG2'[t] == -((V25p*(1 - Cdc25[t]) + V25*Cdc25[ t])*PG2[t]) + k4*PG2R[t] + k7r*PG2R[t] - k7*PG2[t] *R[t] - PG2[t]*(V2p*(1 - UbE[t]) + V2*UbE[t]) + G2K[t]*(Vwp*(1 - Wee1[t]) + Vw*Wee1[t])
  // PG2R 0 PG2R'[t] == -(k4*PG2R[t]) - k7r*PG2R[t] + k7* PG2[t]*R[t] - PG2R[t]*(k2p + V2p*(1 - UbE[t]) + V2*UbE[t])
  // R 0 R'[t] == k3 + k6p*G1R[t] + k8r*G1R[t] + k7r*G2R[t] + k7r*PG2R[t] - k4*R[t] - k8*G1K[ t]*R[t] - k7*G2K[t]*R[t] - k7*PG2[t]*R[t] - (kp* mass[t]*(Cig1 + alpha*G1K[t] + G2K[t] + beta*PG2[t])*R[t] )/(Kmp + R[t]) + G2R[t]*(k2p + V2p*(1 - UbE[t]) + V2*UbE[t]) + PG2R[t]*(k2p + V2p*( 1 - UbE[t]) + V2*UbE[t])
  // UbE 0 UbE'[t] == (ku*IE[t]*(1 - UbE[t]))/(1 + Kmu - UbE[t]) - (kur*UbE[t])/(Kmur + UbE[t])
  // UbE2 0 UbE2'[t] == (ku2*(G2K[t] + beta*PG2[t])*(1 - UbE2[t]))/(1 + Kmu2 - UbE2[t]) - (kur2*UbE2[ t])/(Kmur2 + UbE2[t])
  // Wee1 0 Wee1'[t] == (kwr*(1 - Wee1[t]))/(1 + Kmwr - Wee1[t]) - (kw*(G2K[t] + beta*PG2[t])* Wee1[t])/(Kmw + Wee1[t])
  // Generated by Cellerator Version 1.0 update 2.1202 using Mathematica 4.2 for Mac OS X (June 4, 2002), December 2, 2002 13:02:55, using (PowerMac,PowerPC,Mac OS X,MacOSX,Darwin)
  // author=B.E.Shapiro

  // Compartments:
  compartment cell;

  // Species:
  species $EmptySet in cell = 0;
  species Cdc25 in cell = 0;
  species G1K in cell = 0;
  species G1R in cell = 0;
  species G2K in cell = 0;
  species G2R in cell = 0;
  species IE in cell = 0;
  species mass in cell = 0.4/cell;
  species PG2 in cell = 0;
  species PG2R in cell = 0;
  species R in cell = 0;
  species UbE in cell = 0;
  species UbE2 in cell = 0;
  species Wee1 in cell = 0;

  // Reactions:
  Reaction1: $EmptySet => mass; mu*mass;
    mu = 0.00495;
  Reaction2: $EmptySet => G2K; k1;
    k1 = 0.015;
  Reaction3: G2K => $EmptySet; G2K*(Reaction3_V2p*(1 - UbE) + Reaction3_V2*UbE);
    Reaction3_V2 = 0.25; Reaction3_V2p = 0.0075;
  Reaction4: $EmptySet => R; k3;
    k3 = 0.09375;
  Reaction5: R => $EmptySet; Reaction5_k4*R;
    Reaction5_k4 = 0.1875;
  Reaction6: G2K => PG2; G2K*(Vwp*(1 - Wee1) + Vw*Wee1);
    Vw = 0.35; Vwp = 0.035;
  Reaction7: PG2 => G2K; PG2*(V25p*(1 - Cdc25) + V25*Cdc25);
    V25 = 0.5; V25p = 0.025;
  Reaction8: G2K + R => G2R; G2K*Reaction8_k7*R;
    Reaction8_k7 = 100;
  Reaction9: G2R => G2K + R; G2R*Reaction9_k7r;
    Reaction9_k7r = 0.1;
  Reaction10: PG2 + R => PG2R; Reaction10_k7*PG2*R;
    Reaction10_k7 = 100;
  Reaction11: PG2R => PG2 + R; Reaction11_k7r*PG2R;
    Reaction11_k7r = 0.1;
  Reaction12: R => $EmptySet; (R*(k0001 + kp*mass*(Cig1 + alpha*G1K + G2K + Reaction12_beta*PG2)))/(Kmp + R);
    Cig1 = 0; k0001 = 0; Kmp = 0.001; kp = 3.25; alpha = 0.25; Reaction12_beta = 0.05;
  Reaction13: G2R => G2K; G2R*Reaction13_k4;
    Reaction13_k4 = 0.1875;
  Reaction14: PG2 => $EmptySet; PG2*(Reaction14_V2p*(1 - UbE) + Reaction14_V2*UbE);
    Reaction14_V2 = 0.25; Reaction14_V2p = 0.0075;
  Reaction15: G2R => R; G2R*(Reaction15_k2p + Reaction15_V2p*(1 - UbE) + Reaction15_V2*UbE);
    Reaction15_k2p = 0.05; Reaction15_V2 = 0.25; Reaction15_V2p = 0.0075;
  Reaction16: PG2R => R; PG2R*(Reaction16_k2p + Reaction16_V2p*(1 - UbE) + Reaction16_V2*UbE);
    Reaction16_k2p = 0.05; Reaction16_V2 = 0.25; Reaction16_V2p = 0.0075;
  Reaction17: PG2R => PG2; Reaction17_k4*PG2R;
    Reaction17_k4 = 0.1875;
  Reaction18: G1R => G1K; G1R*Reaction18_k4;
    Reaction18_k4 = 0.1875;
  Reaction19: $EmptySet => G1K; k5;
    k5 = 0.00175;
  Reaction20: G1K => $EmptySet; G1K*(V6p*(1 - UbE2) + V6*UbE2);
    V6 = 7.5; V6p = 0.0375;
  Reaction21: G1K + R => G1R; G1K*k8*R;
    k8 = 10;
  Reaction22: G1R => G1K + R; G1R*k8r;
    k8r = 0.1;
  Reaction23: G1R => R; G1R*k6p;
    k6p = 0;
  Reaction24: $EmptySet => UbE; ((k0002 + IE*ku)*(1 - UbE))/(1 + Kmu - UbE);
    k0002 = 0; Kmu = 0.01; ku = 0.2;
  Reaction25: $EmptySet => Cdc25; ((1 - Cdc25)*kc*(G2K + Reaction25_beta*PG2))/(1 - Cdc25 + Kmc);
    kc = 1; Kmc = 0.1; Reaction25_beta = 0.05;
  Reaction26: $EmptySet => IE; ((1 - IE)*ki*(G2K + Reaction26_beta*PG2))/(1 - IE + Kmi);
    ki = 0.4; Kmi = 0.01; Reaction26_beta = 0.05;
  Reaction27: $EmptySet => UbE2; (ku2*(1 - UbE2)*(G2K + Reaction27_beta*PG2))/(1 + Kmu2 - UbE2);
    Kmu2 = 0.05; ku2 = 1; Reaction27_beta = 0.05;
  Reaction28: $EmptySet => Wee1; (kwr*(1 - Wee1))/(1 + Kmwr - Wee1);
    Kmwr = 0.1; kwr = 0.25;
  Reaction29: IE => $EmptySet; (IE*kir)/(IE + Kmir);
    kir = 0.1; Kmir = 0.01;
  Reaction30: UbE => $EmptySet; (kur*UbE)/(Kmur + UbE);
    Kmur = 0.01; kur = 0.1;
  Reaction31: UbE2 => $EmptySet; (kur2*UbE2)/(Kmur2 + UbE2);
    Kmur2 = 0.05; kur2 = 0.3;
  Reaction32: Wee1 => $EmptySet; (kw*Wee1*(G2K + Reaction32_beta*PG2))/(Kmw + Wee1);
    Kmw = 0.1; kw = 1; Reaction32_beta = 0.05;
  Reaction33: Cdc25 => $EmptySet; (Cdc25*kcr)/(Cdc25 + Kmcr);
    kcr = 0.25; Kmcr = 0.1;
end
