// SBML level 2 version 1

model Model_0()
  // Circadian Clock
  // This is a model of the Drosophila circadian clock based on the PER and TIM genes, as published in Leloup J.-C. and Goldbeter A. (1999) "Chaos and birhythmicity in a model of circadian oscillations of the PER and TIM proteins in Drosophila" J. Theor. Biol. 198, 445-459

  // Compartments:
  compartment cell = 1;

  // Species:
  species P0 in cell = 0.09999998;
  species Mt in cell = 0.9185437;
  species Mp in cell = 0.9185437;
  species T0 in cell = 0.235579;
  species P1 in cell = 0.1962607;
  species P2 in cell = 0.04563808;
  species T1 in cell = 0.1962607;
  species T2 in cell = 0.04563808;
  species C in cell = 0.09999998;
  species Cn in cell = 0.6116661;

  // Reactions:
  sP: => P0; sP_k*Mp;  // modifiers: Mp
    sP_k = 0.9;
  Mp_transcription: => Mp; Mp_transcription_V*Mp_transcription_K^Mp_transcription_n/(Mp_transcription_K^Mp_transcription_n + Cn^Mp_transcription_n);  // modifiers: Cn
    Mp_transcription_V = 1; Mp_transcription_K = 0.9; Mp_transcription_n = 4;
  Mp_degradation: Mp => ; Mp_degradation_V*Mp/(Mp_degradation_Km + Mp);
    Mp_degradation_Km = 0.2; Mp_degradation_V = 0.7;
  Mt_transcription: => Mt; Mt_transcription_V*Mt_transcription_K^Mt_transcription_n/(Mt_transcription_K^Mt_transcription_n + Cn^Mt_transcription_n);  // modifiers: Cn
    Mt_transcription_V = 1; Mt_transcription_K = 0.9; Mt_transcription_n = 4;
  Mt_degradation: Mt => ; Mt_degradation_V*Mt/(Mt_degradation_Km + Mt);
    Mt_degradation_Km = 0.2; Mt_degradation_V = 0.7;
  sT: => T0; sT_k*Mt;  // modifiers: Mt
    sT_k = 0.9;
  _1P: P0 => P1; _1P_V*P0/(_1P_Km + P0);
    _1P_Km = 2; _1P_V = 8;
  _2P: P1 => P0; _2P_V*P1/(_2P_Km + P1);
    _2P_Km = 2; _2P_V = 1;
  _3P: P1 => P2; _3P_V*P1/(_3P_Km + P1);
    _3P_Km = 2; _3P_V = 8;
  _4P: P2 => P1; _4P_V*P2/(_4P_Km + P2);
    _4P_Km = 2; _4P_V = 1;
  _1T: T0 => T1; _1T_V*T0/(_1T_Km + T0);
    _1T_Km = 2; _1T_V = 8;
  _2T: T1 => T0; _2T_V*T1/(_2T_Km + T1);
    _2T_Km = 2; _2T_V = 1;
  _3T: T1 => T2; _3T_V*T1/(_3T_Km + T1);
    _3T_Km = 2; _3T_V = 8;
  _4T: T2 => T1; _4T_V*T2/(_4T_Km + T2);
    _4T_Km = 2; _4T_V = 1;
  dP: P2 => ; dP_V*P2/(dP_Km + P2);
    dP_Km = 0.2; dP_V = 2;
  dT: T2 => ; dT_V*T2/(dT_Km + T2);
    dT_Km = 0.2; dT_V = 2;
  Mt_dilution: Mt => ; Mt_dilution_k1*Mt;
    Mt_dilution_k1 = 0.01;
  Mp_dilution: Mp => ; Mp_dilution_k1*Mp;
    Mp_dilution_k1 = 0.01;
  P0_dilution: P0 => ; P0_dilution_k1*P0;
    P0_dilution_k1 = 0.01;
  P1_dilution: P1 => ; P1_dilution_k1*P1;
    P1_dilution_k1 = 0.01;
  P2_dilution: P2 => ; P2_dilution_k1*P2;
    P2_dilution_k1 = 0.01;
  T0_dilution: T0 => ; T0_dilution_k1*T0;
    T0_dilution_k1 = 0.01;
  T1_dilution: T1 => ; T1_dilution_k1*T1;
    T1_dilution_k1 = 0.01;
  T2_dilution: T2 => ; T2_dilution_k1*T2;
    T2_dilution_k1 = 0.01;
  C_dilution: C => ; C_dilution_k1*C;
    C_dilution_k1 = 0.01;
  Cn_dilution: Cn => ; Cn_dilution_k1*Cn;
    Cn_dilution_k1 = 0.01;
  T2_degradation: T2 => ; T2_degradation_V*T2/(T2_degradation_Km + T2);
    T2_degradation_Km = 0.2; T2_degradation_V = 2;
  P2_degradation: P2 => ; P2_degradation_V*P2/(P2_degradation_Km + P2);
    P2_degradation_Km = 0.2; P2_degradation_V = 2;
  PT_binding_forward: P2 + T2 => C; PT_binding_forward_k1*P2*T2; PT_binding_forward is "PT binding (forward)";
    PT_binding_forward_k1 = 1.2;
  PT_binding_backward: C => P2 + T2; PT_binding_backward_k1*C; PT_binding_backward is "PT binding (backward)";
    PT_binding_backward_k1 = 0.6;
  C_transport_forward: C => Cn; C_transport_forward_k1*C; C_transport_forward is "C transport (forward)";
    C_transport_forward_k1 = 0.6;
  C_transport_backward: Cn => C; C_transport_backward_k1*Cn; C_transport_backward is "C transport (backward)";
    C_transport_backward_k1 = 0.2;

  // Unit definitions:
  unit time = 3600 second;
  unit substance = 1e-9 mole;
end
