// SBML level 2 version 1

function function_0(v)
  v;
end

model Model_1()
  // New Model
  // Dummy testmodel. K3 should always be [B]+2.0.

  // Compartments:
  compartment compartment_0 = 2;

  // Species:
  species A in compartment_0 = 0.1;
  species B in compartment_0 = 5;
  species C in compartment_0 = 0;

  // Parameters:
  var K1;
  var K2;
  var K3;
  var K4;
  K5 = 2;

  // Assignment rules:
  K1 := B/compartment_0 - 0.1;
  K2 := 0.5*K5;
  K4 := 2*K1 + 1.2;
  K3 := K4 + K2;

  // Reactions:
  reaction_0: => A; compartment_0*function_0(K3);
  reaction_1: B => C; compartment_0*function_0(v);
    v = 0.1;

  // Unit definitions:
  unit volume = 1e-3 litre;
  unit substance = 1e-3 mole;
end
