// SBML level 2 version 1

function function_0(v)
  v;
end

model Model_1()
  // New Model

  // Compartments:
  compartment compartment_0 = 1;

  // Species:
  species A in compartment_0 = 0.1;
  species B in compartment_0 = 5;
  species C in compartment_0 = 0;

  // Parameters:
  K1 = 0;
  K2 = 0;
  K3 = 0;
  K4 = 0;
  K5 = 0;

  // Rate rules:
  K1' = 5*C;
  K2' = 0.25*K5;
  K4' = 0.1*K1;
  K3' = K4 + K2 + 1;

  // Reactions:
  reaction_0: => A; compartment_0*function_0(K3);
  reaction_1: B => C; compartment_0*function_0(v);
    v = 0;

  // Unit definitions:
  unit volume = 1e-3 litre;
  unit substance = 1e-3 mole;
end
