// SBML level 2 version 1

function function_0(v)
  v;
end

model Model_1()
  // New Model
  // A double logarythmic plot of time against K1 should show a straight line with a slope of 2

  // Compartments:
  compartment compartment_0 = 1;

  // Species:
  species A in compartment_0 = 0.1;
  species B in compartment_0 = 5;
  species C in compartment_0 = 0;

  // Parameters:
  K1 = 0;

  // Rate rules:
  K1' = 2*time;

  // Reactions:
  reaction_0: => A; compartment_0*function_0(K1);
  reaction_1: B => C; compartment_0*k1*B;
    k1 = 0.1;

  // Unit definitions:
  unit volume = 1e-3 litre;
  unit substance = 1e-3 mole;
end
