// SBML level 2 version 1

function a(Vf, Kms, A, Vr, Kmp, B, compartment_0)
  compartment_0*((Vf*A/Kms - Vr*B/Kmp)/(1 + A/Kms + B/Kmp));
end

model Model_0()
  // New Model

  // Compartments:
  compartment compartment_0 = 1;

  // Species:
  species A in compartment_0 = 0.1;
  species B in compartment_0 = 0.1;
  species C in compartment_0 = 0.1;
  species D in compartment_0 = 0.1;

  // Reactions:
  reaction_0: A -> B; compartment_0*((reaction_0_Vf*A/reaction_0_Kms - reaction_0_Vr*B/reaction_0_Kmp)/(1 + A/reaction_0_Kms + B/reaction_0_Kmp));
    reaction_0_Kms = 0.1; reaction_0_Kmp = 0.1; reaction_0_Vf = 0.1; reaction_0_Vr = 0.1;
  reaction_1: C -> D; a(reaction_1_Vf, reaction_1_Kms, C, reaction_1_Vr, reaction_1_Kmp, D, compartment_0);
    reaction_1_Kms = 0.1; reaction_1_Kmp = 0.1; reaction_1_Vf = 0.1; reaction_1_Vr = 0.1;

  // Unit definitions:
  unit volume = 1e-3 litre;
  unit substance = 1e-3 mole;
end
