// SBML level 2 version 1

function a(V, Km, A, compartment_0)
  compartment_0*(V*A/(Km + A));
end

model Model_0()
  // New Model

  // Compartments:
  compartment compartment_0 = 1;

  // Species:
  species A in compartment_0 = 0.1;
  species B in compartment_0 = 0.1;
  species C in compartment_0 = 0.1;
  species D in compartment_0 = 0.1;

  // Reactions:
  reaction_0: A => B; compartment_0*(reaction_0_V*A/(reaction_0_Km + A));
    reaction_0_Km = 0.1; reaction_0_V = 0.1;
  reaction_1: C => D; a(reaction_1_V, reaction_1_Km, C, compartment_0);
    reaction_1_Km = 0.1; reaction_1_V = 0.1;

  // Unit definitions:
  unit volume = 1e-3 litre;
  unit substance = 1e-3 mole;
end
