// SBML level 2 version 1

function function_3(V, substrate, Km)
  V*substrate/(Km + substrate);
end

function function_2(V, E, S, Km)
  V*E*S/(Km + S);
end

function function_1(Activator, k)
  Activator*k;
end

function function_0(v)
  v;
end

model Model_1()
  // Kummer calcium model
  // Simplified (3-variable) calcium oscillation model Kummer et al. (2000) Biophys. J. 79, 1188-1195

  // Compartments:
  compartment compartment_0 = 1e-18;

  // Species:
  species a in compartment_0 = 7.999995;
  species b in compartment_0 = 7.999995;
  species c in compartment_0 = 7.999995;

  // Reactions:
  R1: => a; compartment_0*function_0(v);
    v = 0.212;
  R2: => a; compartment_0*function_1(a, R2_k);
    R2_k = 2.9;
  R3: a => ; compartment_0*function_2(R3_V, b, a, R3_Km);  // modifiers: b
    R3_V = 1.52; R3_Km = 0.19;
  R4: a => ; compartment_0*function_2(R4_V, c, a, R4_Km);  // modifiers: c
    R4_V = 4.88; R4_Km = 1.18;
  R5: => b; compartment_0*function_1(a, R5_k);  // modifiers: a
    R5_k = 1.24;
  R6: b => ; compartment_0*function_3(R6_V, b, R6_Km);
    R6_V = 32.24; R6_Km = 29.09;
  R7: => c; compartment_0*function_1(a, R7_k);  // modifiers: a
    R7_k = 13.58;
  R8: c => ; compartment_0*function_3(R8_V, c, R8_Km);
    R8_V = 153; R8_Km = 0.16;

  // Unit definitions:
  unit volume = 1e-3 litre;
  unit substance = 1e-3 mole;
end
