// SBML level 2 version 1
// Begin CVS Header
// $Source: /Volumes/Home/Users/shoops/cvs/copasi_dev/copasi/sbml/unittests/models/hasOnlySubstanceUnits2.xml,v $
// $Revision: 1.1 $
// $Name:  $
// $Author: gauges $
// $Date: 2007/11/02 16:06:12 $
// End CVS Header
// Copyright (C) 2007 by Pedro Mendes, Virginia Tech Intellectual
// Properties, Inc. and EML Research, gGmbH.
// All rights reserved.

model model()
  // Testmodel
  // testmodel where a species has the hasOnlySubstanceUnits flag set and is determined by a rate rule.

  // Compartments:
  compartment Compartment_1 = 1e-16;

  // Species:
  substanceOnly species Species_1 in Compartment_1 = 3;

  // Rate rules:
  Species_1' = 0*3;
end
