// SBML level 2 version 1
// Begin CVS Header
// $Source: /Volumes/Home/Users/shoops/cvs/copasi_dev/copasi/sbml/unittests/models/substanceUnits2.xml,v $
// $Revision: 1.2 $
// $Name:  $
// $Author: gauges $
// $Date: 2007/11/03 19:42:07 $
// End CVS Header
// Copyright (C) 2007 by Pedro Mendes, Virginia Tech Intellectual
// Properties, Inc. and EML Research, gGmbH.
// All rights reserved.

model model()
  // Testmodel
  // testmodel where all species and kinetic laws have the substance units set to "mySubstanceUnit" which is identical to the "substance" unit definition.
  // The units after import should be set to liter, second and micromole.
  // There should be no warnings.

  // Compartments:
  compartment Compartment_1 = 1e-16;

  // Species:
  species Species_1 in Compartment_1 = 10/Compartment_1;  // substance in mySubstanceUnit
  species Species_2 in Compartment_1 = 0;  // substance in mySubstanceUnit
  species Species_3 in Compartment_1 = 0;  // substance in mySubstanceUnit
  species Species_4 in Compartment_1 = 0;  // substance in mySubstanceUnit
  species Species_5 in Compartment_1 = 0;  // substance in mySubstanceUnit
  species Species_6 in Compartment_1 = 0;  // substance in mySubstanceUnit
  species Species_7 in Compartment_1 = 0;  // substance in mySubstanceUnit
  species Species_8 in Compartment_1 = 0;  // substance in mySubstanceUnit

  // Parameters:
  parameter1 = 0;

  // Reactions:
  Reaction_1: Species_1 -> Species_2; Compartment_1*parameter1*Species_1;
  Reaction_2: Species_2 -> Species_3; Compartment_1*parameter1*Species_2;
  Reaction_3: Species_3 -> Species_4; Compartment_1*parameter1*Species_3;
  Reaction_4: Species_4 -> Species_5; Compartment_1*parameter1*Species_4;
  Reaction_5: Species_5 -> Species_6; Compartment_1*parameter1*Species_5;
  Reaction_6: Species_6 -> Species_7; Compartment_1*parameter1*Species_6;
  Reaction_7: Species_7 -> Species_8; Compartment_1*parameter1*Species_7;

  // Unit definitions:
  unit substance = 1e-6 mole;
  unit mySubstanceUnit = 1e-6 mole;
end
