// SBML level 2 version 1
// Begin CVS Header
// $Source: /Volumes/Home/Users/shoops/cvs/copasi_dev/copasi/sbml/unittests/models/timeUnits4.xml,v $
// $Revision: 1.2 $
// $Name:  $
// $Author: gauges $
// $Date: 2007/11/03 19:42:07 $
// End CVS Header
// Copyright (C) 2007 by Pedro Mendes, Virginia Tech Intellectual
// Properties, Inc. and EML Research, gGmbH.
// All rights reserved.

model model()
  // Testmodel
  // testmodel where all kinetic laws have the time units set to either "time" or a custom time unit that is different from time or a third that is different from the other two.
  // The units after import should be set to microsecond, liter and mole.
  // Warnings are expected for reaction2 and reaction5.

  // Compartments:
  compartment Compartment_1 = 1e-16;

  // Species:
  species Species_1 in Compartment_1 = 10/Compartment_1;
  species Species_2 in Compartment_1 = 0;
  species Species_3 in Compartment_1 = 0;
  species Species_4 in Compartment_1 = 0;
  species Species_5 in Compartment_1 = 0;
  species Species_6 in Compartment_1 = 0;
  species Species_7 in Compartment_1 = 0;
  species Species_8 in Compartment_1 = 0;

  // Parameters:
  parameter1 = 0;

  // Reactions:
  Reaction_1: Species_1 -> Species_2; Compartment_1*parameter1*Species_1;
  Reaction_2: Species_2 -> Species_3; Compartment_1*parameter1*Species_2;
  Reaction_3: Species_3 -> Species_4; Compartment_1*parameter1*Species_3;
  Reaction_4: Species_4 -> Species_5; Compartment_1*parameter1*Species_4;
  Reaction_5: Species_5 -> Species_6; Compartment_1*parameter1*Species_5;
  Reaction_6: Species_6 -> Species_7; Compartment_1*parameter1*Species_6;
  Reaction_7: Species_7 -> Species_8; Compartment_1*parameter1*Species_7;

  // Unit definitions:
  unit time = 1e-6 second;
  unit myTimeUnit = 1e-6 second;
  unit myOtherTimeUnit = 1e-3 second;
end
