// SBML level 2 version 1
// Begin CVS Header
// $Source: /Volumes/Home/Users/shoops/cvs/copasi_dev/copasi/sbml/unittests/models/variableVolume2.xml,v $
// $Revision: 1.1 $
// $Name:  $
// $Author: gauges $
// $Date: 2007/11/02 16:06:12 $
// End CVS Header
// Copyright (C) 2007 by Pedro Mendes, Virginia Tech Intellectual
// Properties, Inc. and EML Research, gGmbH.
// All rights reserved.

model model()
  // Testmodel
  // testmodel where a species has the hasOnlySubstanceUnits flag set and is determined by a rate rule and lies in a variable compartment.

  // Compartments:
  compartment Compartment_1;

  // Species:
  substanceOnly species Species_1 in Compartment_1 = 3;

  // Assignment rules:
  Compartment_1 := 1*2;

  // Rate rules:
  Species_1' = 0*3;
end
