// SBML level 1 version 1

model SEQFB()
  // This is a model of a branched pathway with sequential feedback, described
  // in Hofmeyr, J.-H. S. (1986), Comput. Aplic. Biosci. 2, 243-249.
  // In the report, look for the Stability Analysis section and note that two
  // eigenvalues are a complex conjugate pair. This indicates that
  // variable perturbations relax back to the steady state with one oscillatory
  // component. If you plot the time course for the fluxes and metabolites concentrations you will see that they have either a maxima or a minima,
  // which are part of the the first cycle (but because it is very damped it is
  // also the last).

  // Compartments:
  compartment compartment = 1;

  // Species:
  species $X in compartment = 10/compartment;
  species A in compartment = 22.09915/compartment;
  species B in compartment = 4.6395/compartment;
  species C in compartment = 0.3357719/compartment;
  species D in compartment = 1/compartment;
  species E in compartment = 0.2777732/compartment;
  species F in compartment = 0.2649989/compartment;
  species $Y in compartment = 2/compartment;
  species $Z in compartment = 1/compartment;

  // Reactions:
  R1: $X -> A; (Vf_1*X/Kms_1-Vr_1*A/Kmp_1)/(1+X/Kms_1+A/Kmp_1+(B/Ki_1)^n_1);
    Vf_1 = 10; Vr_1 = 1; Kms_1 = 1; Kmp_1 = 1; n_1 = 2; Ki_1 = 1;
  R2: A -> B; Vf_2*A-Vr_2*B/(Kms_2*Kmp_2+Kmp_2*A+Kms_2*B);
    Kms_2 = 1; Kmp_2 = 1; Vf_2 = 2; Vr_2 = 1;
  R3: B -> C; (Vf_3*B/Kms_3-Vr_3*C/Kmp_3)/(1+B/Kms_3+C/Kmp_3+(D/Ki_3)^n_3);
    Vf_3 = 1; Vr_3 = 1; Kms_3 = 1; Kmp_3 = 1; n_3 = 2; Ki_3 = 1;
  R4: C -> D; Vf_4*C-Vr_4*D/(Kms_4*Kmp_4+Kmp_4*C+Kms_4*D);
    Kms_4 = 1; Kmp_4 = 1; Vf_4 = 5; Vr_4 = 1;
  R5: B -> E; (Vf_5*B/Kms_5-Vr_5*E/Kmp_5)/(1+B/Kms_5+E/Kmp_5+(F/Ki_5)^n_5);
    Vf_5 = 1; Vr_5 = 1; Kms_5 = 1; Kmp_5 = 1; n_5 = 2; Ki_5 = 1;
  R6: E -> F; Vf_6*E-Vr_6*F/(Kms_6*Kmp_6+Kmp_6*E+Kms_6*F);
    Kms_6 = 1; Kmp_6 = 1; Vf_6 = 5; Vr_6 = 1;
  R7: D -> $Y; Vf_7*D-Vr_7*Y/(Kms_7*Kmp_7+Kmp_7*D+Kms_7*Y);
    Kms_7 = 1; Kmp_7 = 1; Vf_7 = 10; Vr_7 = 1;
  R8: F -> $Z; Vf_8*F-Vr_8*Z/(Kms_8*Kmp_8+Kmp_8*F+Kms_8*Z);
    Kms_8 = 1; Kmp_8 = 1; Vf_8 = 10; Vr_8 = 1;
end
