// SBML level 1 version 1

model Yeast_glycolysis_model_of_Pritchard_and_Kell()
  // From Pritchard and Kell (2002) Eur. J. Biochem. 269, 3894-3904 which was
  // modified from Teusink et al. (2000) Eur J Biochem 267, 5313-5329.
  // This version uses the Vmaxes found by the best fit (R1) of Table 1 of the
  // Pritchard and Kell paper, and simulates a decrease of external glucose concentration from 100 to 2 mM.
  // (More model files at http://users.aber.ac.uk/lep/models.shtml)

  // Compartments:
  compartment compartment = 1;

  // Species:
  species $GLCo in compartment = 2/compartment;
  species GLCi in compartment = 0.09765223/compartment;
  species ATP in compartment = 2.525127/compartment;
  species G6P in compartment = 2.67504/compartment;
  species ADP in compartment = 1.281988/compartment;
  species F6P in compartment = 0.6249764/compartment;
  species F16bP in compartment = 6.221321/compartment;
  species AMP in compartment = 0.2928849/compartment;
  species $F26bP in compartment = 0.02/compartment;
  species DHAP in compartment = 1.004153/compartment;
  species GAP in compartment = 0.04518092/compartment;
  species NAD in compartment = 1.50329/compartment;
  species BPG in compartment = 0.0007368735/compartment;
  species NADH in compartment = 0.0867097/compartment;
  species P3G in compartment = 0.8856885/compartment;
  species P2G in compartment = 0.1276958/compartment;
  species PEP in compartment = 0.06323521/compartment;
  species PYR in compartment = 1.815313/compartment;
  species AcAld in compartment = 0.1781406/compartment;
  species $CO2 in compartment = 1/compartment;
  species $EtOH in compartment = 50/compartment;
  species $Glycerol in compartment = 0.15/compartment;
  species $Glycogen in compartment = 0;
  species $Trehalose in compartment = 0;
  species $Succinate in compartment = 0;

  // Reactions:
  HXT: $GLCo -> GLCi; (((Vmax_1)*(GLCo-GLCi))/(Kglc_1))/(1 +(GLCo+GLCi)/(Kglc_1)+(((Ki_1)*(GLCo))*(GLCi))/((Kglc_1)^(2 )));
    Vmax_1 = 97.24; Kglc_1 = 1.1918; Ki_1 = 0.91;
  HK: GLCi + ATP -> G6P + ADP; ((Vmax_2)*(((GLCi)*(ATP))/((Kglc_2)*(Katp_2))-((G6P)*(ADP))/(((Kglc_2)*(Katp_2))*(Keq_2))))/((1 +(GLCi)/(Kglc_2)+(G6P)/(Kg6p_2))*(1 +(ATP)/(Katp_2)+(ADP)/(Kadp_2)));
    Vmax_2 = 236.7; Kglc_2 = 0.08; Katp_2 = 0.15; Keq_2 = 2000; Kg6p_2 = 30; Kadp_2 = 0.23;
  PGI: G6P -> F6P; ((Vmax_3)*((G6P)/(Kg6p_3)-(F6P)/((Kg6p_3)*(Keq_3))))/(1 +(G6P)/(Kg6p_3)+(F6P)/(Kf6p_3));
    Vmax_3 = 1056; Kg6p_3 = 1.4; Keq_3 = 0.29; Kf6p_3 = 0.3;
  PFK: ATP + F6P => ADP + F16bP; (Vmax_4)*(((((gR_4)*((F6P)/(Kf6p_4)))*((ATP)/(Katp_4)))*(1 +(F6P)/(Kf6p_4)+(ATP)/(Katp_4)+((((gR_4)*(F6P))/(Kf6p_4))*(ATP))/(Katp_4)))/((1 +(F6P)/(Kf6p_4)+(ATP)/(Katp_4)+((((gR_4)*(F6P))/(Kf6p_4))*(ATP))/(Katp_4))^(2 )+((((L0_4)*(((1 +((Ciatp_4)*(ATP))/(Kiatp_4))/(1 +(ATP)/(Kiatp_4)))^(2 )))*(((1 +((Camp_4)*(AMP))/(Kamp_4))/(1 +(AMP)/(Kamp_4)))^(2 )))*(((1 +((Cf26_4)*(F26bP))/(Kf26_4)+((Cf16_4)*(F16bP))/(Kf16_4))/(1 +(F26bP)/(Kf26_4)+(F16bP)/(Kf16_4)))^(2 )))*((1 +((Catp_4)*(ATP))/(Katp_4))^(2 ))));
    Vmax_4 = 110; gR_4 = 5.12; Kf6p_4 = 0.1; Katp_4 = 0.71; L0_4 = 0.66; Ciatp_4 = 100; Kiatp_4 = 0.65; Camp_4 = 0.0845; Kamp_4 = 0.0995; Cf26_4 = 0.0174; Kf26_4 = 0.000682; Cf16_4 = 0.397; Kf16_4 = 0.111; Catp_4 = 3;
  ALD: F16bP -> DHAP + GAP; ((Vmax_5)*((F16bP)/(Kf16bp_5)-((DHAP)*(GAP))/((Kf16bp_5)*(Keq_5))))/(1 +(F16bP)/(Kf16bp_5)+(DHAP)/(Kdhap_5)+(GAP)/(Kgap_5)+((F16bP)*(GAP))/((Kf16bp_5)*(Kigap_5))+((DHAP)*(GAP))/((Kdhap_5)*(Kgap_5)));
    Vmax_5 = 94.69; Kf16bp_5 = 0.3; Keq_5 = 0.069; Kdhap_5 = 2; Kgap_5 = 2.4; Kigap_5 = 10;
  TPI: DHAP -> GAP; k1_6*DHAP-k2_6*GAP;
    k1_6 = 450000; k2_6 = 10000000;
  GAPDH: GAP + NAD -> BPG + NADH; ((C_7)*((((Vmaxf_7)*(GAP))*(NAD))/((Kgap_7)*(Knad_7))-(((Vmaxr_7)*(BPG))*(NADH))/((Kbpg_7)*(Knadh_7))))/((1 +(GAP)/(Kgap_7)+(BPG)/(Kbpg_7))*(1 +(NAD)/(Knad_7)+(NADH)/(Knadh_7)));
    C_7 = 1; Vmaxf_7 = 1152; Kgap_7 = 0.21; Knad_7 = 0.09; Vmaxr_7 = 6719; Kbpg_7 = 0.0098; Knadh_7 = 0.06;
  PGK: ADP + BPG -> ATP + P3G; ((Vmax_8)*((((Keq_8)*(BPG))*(ADP)-(P3G)*(ATP))/((Kp3g_8)*(Katp_8))))/((1 +(BPG)/(Kbpg_8)+(P3G)/(Kp3g_8))*(1 +(ADP)/(Kadp_8)+(ATP)/(Katp_8)));
    Vmax_8 = 1288; Keq_8 = 3200; Kp3g_8 = 0.53; Katp_8 = 0.3; Kbpg_8 = 0.003; Kadp_8 = 0.2;
  PGM: P3G -> P2G; ((Vmax_9)*((P3G)/(Kp3g_9)-(P2G)/((Kp3g_9)*(Keq_9))))/(1 +(P3G)/(Kp3g_9)+(P2G)/(Kp2g_9));
    Vmax_9 = 2585; Kp3g_9 = 1.2; Keq_9 = 0.19; Kp2g_9 = 0.08;
  ENO: P2G -> PEP; ((Vmax_10)*((P2G)/(Kp2g_10)-(PEP)/((Kp2g_10)*(Keq_10))))/(1 +(P2G)/(Kp2g_10)+(PEP)/(Kpep_10));
    Vmax_10 = 201.6; Kp2g_10 = 0.04; Keq_10 = 6.7; Kpep_10 = 0.5;
  PYK: ADP + PEP -> ATP + PYR; ((Vmax_11)*(((PEP)*(ADP))/((Kpep_11)*(Kadp_11))-((PYR)*(ATP))/(((Kpep_11)*(Kadp_11))*(Keq_11))))/((1 +(PEP)/(Kpep_11)+(PYR)/(Kpyr_11))*(1 +(ADP)/(Kadp_11)+(ATP)/(Katp_11)));
    Vmax_11 = 1000; Kpep_11 = 0.14; Kadp_11 = 0.53; Keq_11 = 6500; Kpyr_11 = 21; Katp_11 = 1.5;
  PDC: PYR => AcAld + $CO2; ((Vmax_12)*(((PYR)/(Kpyr_12))^(nH_12)))/(1 +((PYR)/(Kpyr_12))^(nH_12));
    Vmax_12 = 857.8; Kpyr_12 = 4.33; nH_12 = 1.9;
  ADH: NAD + $EtOH -> NADH + AcAld; ((Vmax_13)*(((EtOH)*(NAD))/((Ketoh_13)*(Kinad_13))-((AcAld)*(NADH))/(((Ketoh_13)*(Kinad_13))*(Keq_13))))/(1 +(NAD)/(Kinad_13)+((EtOH)*(Knad_13))/((Kinad_13)*(Ketoh_13))+((AcAld)*(Knadh_13))/((Kinadh_13)*(Kacald_13))+(NADH)/(Kinadh_13)+((EtOH)*(NAD))/((Kinad_13)*(Ketoh_13))+(((NAD)*(AcAld))*(Knadh_13))/(((Kinad_13)*(Kinadh_13))*(Kacald_13))+(((EtOH)*(NADH))*(Knad_13))/(((Kinad_13)*(Kinadh_13))*(Ketoh_13))+((AcAld)*(NADH))/((Kacald_13)*(Kinadh_13))+(((EtOH)*(NAD))*(AcAld))/(((Kinad_13)*(Kiacald_13))*(Ketoh_13))+(((EtOH)*(AcAld))*(NADH))/(((Kietoh_13)*(Kinadh_13))*(Kacald_13)));
    Vmax_13 = 209.5; Ketoh_13 = 17; Kinad_13 = 0.92; Keq_13 = 6.9e-5; Knad_13 = 0.17; Knadh_13 = 0.11; Kinadh_13 = 0.031; Kacald_13 = 1.11; Kiacald_13 = 1.1; Kietoh_13 = 90;
  ATPase: ATP => ADP; (Katpase_14)*(ATP);
    Katpase_14 = 39.5;
  AK: 2 ADP -> ATP + AMP; k1_15*ADP*ADP-k2_15*ATP*AMP;
    k1_15 = 45; k2_15 = 100;
  G3PDH: DHAP + NADH => NAD + $Glycerol; ((Vmax_16)*(((DHAP)/(Kdhap_16))*((NADH)/(Knadh_16))-(((Glycerol)/(Kdhap_16))*((NAD)/(Knadh_16)))*((1 )/(Keq_16))))/((1 +(DHAP)/(Kdhap_16)+(Glycerol)/(Kglycerol_16))*(1 +(NADH)/(Knadh_16)+(NAD)/(Knad_16)));
    Vmax_16 = 47.11; Kdhap_16 = 0.4; Knadh_16 = 0.023; Keq_16 = 4300; Kglycerol_16 = 1; Knad_16 = 0.93;
  Glycogen_Branch: ATP + G6P => ADP + $Glycogen; KGLYCOGEN_17;
    KGLYCOGEN_17 = 6;
  Trehalose_Branch: ATP + 2 G6P => ADP + $Trehalose; Ktrehalose_18;
    Ktrehalose_18 = 2.4;
  Succinate_Branch: 3 NAD + 2 AcAld => 3 NADH + $Succinate; (k_19)*(AcAld);
    k_19 = 21.4;
end
