// SBML level 1 version 1

model The_Brusselator()
  // The famous Brusselator model in which a chemical species X catalyses
  // its own formation. In a certain region of parameter space the Brusselator
  // can function in a limit cycle regime around an unstable steady state.
  // Run this simulation and then check the report file to see how Gepasi can find an unstable steady state, and calculate the eigenvalues of the Jacobian matrix.

  // Compartments:
  compartment compartment = 1;

  // Species:
  species $A in compartment = 0.5/compartment;
  species X in compartment = 3/compartment;
  species Y in compartment = 3/compartment;
  species $B in compartment = 3/compartment;
  species $D in compartment = 0;
  species $E in compartment = 0;

  // Reactions:
  R1: $A => X; k_1*A;
    k_1 = 1;
  R2: 2 X + Y => 3 X; k_2*X*X*Y;
    k_2 = 1;
  R3: X + $B => Y + $D; k_3*X*B;
    k_3 = 1;
  R4: X => $E; k_4*X;
    k_4 = 1;
end
