// SBML level 3 version 1
// Copyright (C) 2021 by Pedro Mendes, Rector and Visitors of the
// University of Virginia, University of Heidelberg, and University
// of Connecticut School of Medicine.
// All rights reserved.

function Function_for_r0(Kf_r0, Kr_r0, s0, s1)
  Kf_r0*s0 + (-(Kr_r0*s1));
end

model _zero__unit_0_det()
  // 0-unit-0_det
  // model units - substance: substance, time: time, volume: unit_0, area: area, length: length, extent: substance

  // Compartments:
  compartment c0 = 4 volume;
  compartment c1 = 8 volume;
  compartment m0 = 12 volume;  // 2-D

  // Species:
  species s0 in c0 = 0;
  species s1 in c0 = 0.0004151347;

  // Parameters:
  Kf_r0 = 0 unit_1;
  Kr_r0 = 0 unit_1;

  // Reactions:
  r0: s0 -> s1; c0*Function_for_r0(Kf_r0, Kr_r0, s0, s1);

  // Unit definitions:
  unit molecules = item;
  unit um3 = (1e-6 metre)^3;
  unit um2 = (1e-6 metre)^2;
  unit um = 1e-6 metre;
  unit s = second;
  unit s_1 = 1 / second;
  unit length = 1e-6 metre;
  unit area = (1e-6 metre)^2;
  unit unit_0 = (1e-6 dimensionless)^0 * metre^3; unit_0 is "µm³";
  unit time = second;
  unit substance = item;
  unit unit_1 = 1 / second; unit_1 is "1/s";
end
